V_batt := 3.7 V
I_batt := 2500*mA/hr
P_batt := 2*V_batt*I_batt = 18.5 W/hr
P_epip := 8.2382 W
° := π/180
deg := °
∠(mag, ang) := mag*(cos(ang*°) + 1j*sin(ang*°))
/∠(cval) := [|cval|, if(|cval| > 10^-6, arg(cval)/°, 0)]
P_batt*0.9/P_epip = 2.02107 1/hr
# for °  type on numpad Alt 0176
Unicode := "∠ώ✽ℓ∈ℝℤℋℐℒℛℱ⁺⁻"
ℐ(z) := Im(z)
ℛ(z) := Re(z)
n := 0 .. strlen(Unicode) - 1
unicode[n] := substr(Unicode, n, 1)
Height := 8.1 mm = 0.318898 in
# for ∠ type on numpad Alt +2220
unicodes := augment(unicode, str2vec(Unicode))
Length := 62.5 mm = 2.46063 in
||(a, b) := a*b/(a + b)
±(a, b) := [a + b; a - b]
Width := 50.5 mm = 1.98819 in
ang(z) := if(|z| > 10^-6, arg(z), -4)
# phasor ∠
# Omega hat ώ
# Convolution ✽
# script L (lower) ℓ
# is an element of ∈
# set of Reals  ℝ
# set of Complex ℤ
# Script H ℋ
# Script I (Imaginary) ℐ
# Laplace ℒ
# Real ℛ
# Fourier ℱ
# + exponent ⁺
# - exponent ⁻
unicodes = [
    "∠", 8736;
    "ώ", 974;
    "✽", 10045;
    "ℓ", 8467;
    "∈", 8712;
    "ℝ", 8477;
    "ℤ", 8484;
    "ℋ", 8459;
    "ℐ", 8464;
    "ℒ", 8466;
    "ℛ", 8475;
    "ℱ", 8497;
    "⁺", 8314;
    "⁻", 8315
]
